*HEADING
ccxview showcase: plate with a hole, tension, pin load and modes
*NODE, NSET=NALL
1, 20, 0, -5
2, 24.5504, 0, -5
3, 24.3182, 3.85162, -5
4, 19.7538, 3.12869, -5
5, 20, 0, 5
6, 24.5504, 0, 5
7, 24.3182, 3.85162, 5
8, 19.7538, 3.12869, 5
9, 21.5011, 0, -5
10, 24.4922, 1.92758, -5
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*ELEMENT, TYPE=C3D20R, ELSET=EALL
1, 1, 2, 3, 4, 5, 6, 7, 8, 9, 10, 11, 12, 13, 14, 15,
16, 17, 18, 19, 20
2, 2, 21, 22, 3, 6, 23, 24, 7, 25, 26, 27, 10, 28, 29, 30,
14, 18, 31, 32, 19
3, 21, 33, 34, 22, 23, 35, 36, 24, 37, 38, 39, 26, 40, 41, 42,
29, 31, 43, 44, 32
4, 33, 45, 46, 34, 35, 47, 48, 36, 49, 50, 51, 38, 52, 53, 54,
41, 43, 55, 56, 44
5, 45, 57, 58, 46, 47, 59, 60, 48, 61, 62, 63, 50, 64, 65, 66,
53, 55, 67, 68, 56
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*NSET, NSET=NLEFT
873, 874, 875, 877, 879, 920, 921, 922, 924, 926, 967, 968, 969, 971, 973, 1014,
1015, 1016, 1018, 1020, 1061, 1062, 1063, 1065, 1067, 1110, 1112
*ELSET, ELSET=EHOLE
1, 7, 13, 19, 25, 31, 37, 43, 49, 55, 61, 67, 73, 79, 85, 91,
97, 103, 109, 115, 121, 127, 133, 139, 145, 151, 157, 163, 169, 175, 181, 187,
193, 199, 205, 211, 217, 223, 229, 235
*NSET, NSET=NHOLE
1, 4, 5, 8, 12, 16, 17, 20, 82, 84, 87, 90, 92, 129, 131, 134,
137, 139, 176, 178, 181, 184, 186, 223, 225, 228, 231, 233, 270, 272, 275, 278,
280, 317, 319, 322, 325, 327, 364, 366, 369, 372, 374, 411, 413, 416, 419, 421,
458, 460, 463, 466, 468, 505, 507, 510, 513, 515, 552, 554, 557, 560, 562, 599,
601, 604, 607, 609, 646, 648, 651, 654, 656, 693, 695, 698, 701, 703, 740, 742,
745, 748, 750, 787, 789, 792, 795, 797, 834, 836, 839, 842, 844, 881, 883, 886,
889, 891, 928, 930, 933, 936, 938, 975, 977, 980, 983, 985, 1022, 1024, 1027, 1030,
1032, 1069, 1071, 1074, 1077, 1079, 1116, 1118, 1121, 1124, 1126, 1163, 1165, 1168, 1171, 1173,
1210, 1212, 1215, 1218, 1220, 1257, 1259, 1262, 1265, 1267, 1304, 1306, 1309, 1312, 1314, 1351,
1353, 1356, 1359, 1361, 1398, 1400, 1403, 1406, 1408, 1445, 1447, 1450, 1453, 1455, 1492, 1494,
1497, 1500, 1502, 1539, 1541, 1544, 1547, 1549, 1586, 1588, 1591, 1594, 1596, 1633, 1635, 1638,
1641, 1643, 1680, 1682, 1685, 1688, 1690, 1727, 1729, 1732, 1735, 1737, 1774, 1776, 1779, 1782,
1784, 1821, 1823, 1826, 1829, 1831, 1868, 1870
*SURFACE, NAME=SRIGHT, TYPE=ELEMENT
6, S4
12, S4
234, S4
240, S4
*SURFACE, NAME=SHOLE, TYPE=ELEMENT
1, S6
7, S6
13, S6
19, S6
25, S6
31, S6
37, S6
43, S6
49, S6
187, S6
193, S6
199, S6
205, S6
211, S6
217, S6
223, S6
229, S6
235, S6
*MATERIAL, NAME=STEEL
*ELASTIC
210000., 0.3
*DENSITY
7.85e-9
*SOLID SECTION, ELSET=EALL, MATERIAL=STEEL
*BOUNDARY
NLEFT, 1, 3
*STEP
*STATIC
*DLOAD
SRIGHT, P, -100.
*NODE FILE
U, RF
*EL FILE
S, E
*EL PRINT, ELSET=EHOLE
S
*NODE PRINT, NSET=NLEFT
RF
*END STEP
*STEP
*STATIC
*DLOAD, OP=NEW
SHOLE, P, 80.
*NODE FILE
U, RF
*EL FILE
S
*END STEP
*STEP
*FREQUENCY
6
*NODE FILE
U
*END STEP
