*HEADING
ccxview symbols: every support, load, thermal load and constraint, one tile each
*NODE, NSET=NALL
1, 0, 0, 0
2, 10, 0, 0
3, 10, 10, 0
4, 0, 10, 0
5, 0, 0, 10
6, 10, 0, 10
7, 10, 10, 10
8, 0, 10, 10
9, 25, 0, 0
10, 35, 0, 0
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*ELEMENT, TYPE=C3D8, ELSET=S1_HELD
1, 1, 2, 3, 4, 5, 6, 7, 8
*ELEMENT, TYPE=S4, ELSET=S2_HELD_ROTATIONS
2, 9, 10, 11, 12
*ELEMENT, TYPE=C3D8, ELSET=S3_PRESCRIBED_DISPLACEMENT
3, 13, 14, 15, 16, 17, 18, 19, 20
*ELEMENT, TYPE=S4, ELSET=S4_PRESCRIBED_ROTATION
4, 21, 22, 23, 24
*ELEMENT, TYPE=C3D8, ELSET=S5_HELD_TEMPERATURE
5, 25, 26, 27, 28, 29, 30, 31, 32
*ELEMENT, TYPE=C3D8, ELSET=S6_CYLINDRICAL_TRANSFORM
6, 33, 34, 35, 36, 37, 38, 39, 40
*ELEMENT, TYPE=C3D8, ELSET=L1_FORCE
7, 41, 42, 43, 44, 45, 46, 47, 48
*ELEMENT, TYPE=B31, ELSET=L2_MOMENT
8, 49, 50
9, 50, 51
*ELEMENT, TYPE=C3D8, ELSET=L3_PRESSURE
10, 52, 53, 54, 55, 56, 57, 58, 59
*ELEMENT, TYPE=C3D8, ELSET=L4_SURFACE_PRESSURE
11, 60, 61, 62, 63, 64, 65, 66, 67
*ELEMENT, TYPE=S4, ELSET=L5_SHELL_EDGE_LOAD
12, 68, 69, 70, 71
*ELEMENT, TYPE=CPS4, ELSET=L6_PLANE_EDGE_PRESSURE
13, 72, 73, 74, 75
*ELEMENT, TYPE=C3D8, ELSET=L7_GRAVITY
14, 76, 77, 78, 79, 80, 81, 82, 83
*ELEMENT, TYPE=C3D8, ELSET=L8_CENTRIFUGAL
15, 84, 85, 86, 87, 88, 89, 90, 91
*ELEMENT, TYPE=C3D8, ELSET=L9_GRAVITY_SIDEWAYS
16, 92, 93, 94, 95, 96, 97, 98, 99
*ELEMENT, TYPE=C3D8, ELSET=L10_BOLT
17, 100, 101, 102, 103, 104, 105, 106, 107
18, 104, 105, 106, 107, 108, 109, 110, 111
*ELEMENT, TYPE=C3D8, ELSET=L11_BOLT
19, 113, 114, 115, 116, 117, 118, 119, 120
20, 117, 118, 119, 120, 121, 122, 123, 124
*ELEMENT, TYPE=C3D8, ELSET=T1_NODE_HEAT
21, 126, 127, 128, 129, 130, 131, 132, 133
*ELEMENT, TYPE=C3D8, ELSET=T2_SURFACE_HEAT
22, 134, 135, 136, 137, 138, 139, 140, 141
*ELEMENT, TYPE=C3D8, ELSET=T3_FILM
23, 142, 143, 144, 145, 146, 147, 148, 149
*ELEMENT, TYPE=C3D8, ELSET=T4_RADIATION
24, 150, 151, 152, 153, 154, 155, 156, 157
*ELEMENT, TYPE=C3D8, ELSET=T5_GIVEN_TEMPERATURE
25, 158, 159, 160, 161, 162, 163, 164, 165
*ELEMENT, TYPE=C3D8, ELSET=T6_BODY_HEAT
26, 166, 167, 168, 169, 170, 171, 172, 173
*ELEMENT, TYPE=C3D8, ELSET=C1_RIGID_BODY
27, 174, 175, 176, 177, 178, 179, 180, 181
*ELEMENT, TYPE=C3D8, ELSET=C2_KINEMATIC_COUPLING
28, 183, 184, 185, 186, 187, 188, 189, 190
*ELEMENT, TYPE=C3D8, ELSET=C3_DISTRIBUTING_COUPLING
29, 192, 193, 194, 195, 196, 197, 198, 199
*ELEMENT, TYPE=C3D8, ELSET=C4_EQUATION
30, 201, 202, 203, 204, 205, 206, 207, 208
*ELEMENT, TYPE=C3D8, ELSET=C5_MPC_BEAM
31, 209, 210, 211, 212, 213, 214, 215, 216
*ELEMENT, TYPE=C3D8, ELSET=C6_TIE
32, 217, 218, 219, 220, 221, 222, 223, 224
33, 225, 226, 227, 228, 229, 230, 231, 232
*ELEMENT, TYPE=C3D8, ELSET=C7_CONTACT
34, 233, 234, 235, 236, 237, 238, 239, 240
35, 241, 242, 243, 244, 245, 246, 247, 248
*ELEMENT, TYPE=SPRINGA, ELSET=C8_SPRING
36, 249, 253
38, 250, 254
40, 251, 255
41, 252, 256
*ELEMENT, TYPE=DASHPOTA, ELSET=C9_DASHPOT
37, 250, 254
*ELEMENT, TYPE=GAPUNI, ELSET=C10_GAP
39, 251, 255
*ELEMENT, TYPE=MASS, ELSET=C11_MASS
42, 256
*NSET, NSET=NTFIX
29, 30, 31, 32
*NSET, NSET=NCYL
33, 34, 35, 36, 37, 38, 39, 40
*NSET, NSET=NHOT
162, 163, 164, 165
*NSET, NSET=NRIGID
178, 179, 180, 181
*MATERIAL, NAME=STEEL
*ELASTIC
210000., 0.3
*DENSITY
7.85e-9
*EXPANSION
1.2e-5
*CONDUCTIVITY
50.
*SPECIFIC HEAT
4.6e8
*SOLID SECTION, ELSET=C1_RIGID_BODY, MATERIAL=STEEL
*SOLID SECTION, ELSET=C2_KINEMATIC_COUPLING, MATERIAL=STEEL
*SOLID SECTION, ELSET=C3_DISTRIBUTING_COUPLING, MATERIAL=STEEL
*SOLID SECTION, ELSET=C4_EQUATION, MATERIAL=STEEL
*SOLID SECTION, ELSET=C5_MPC_BEAM, MATERIAL=STEEL
*SOLID SECTION, ELSET=C6_TIE, MATERIAL=STEEL
*SOLID SECTION, ELSET=C7_CONTACT, MATERIAL=STEEL
*SOLID SECTION, ELSET=L10_BOLT, MATERIAL=STEEL
*SOLID SECTION, ELSET=L11_BOLT, MATERIAL=STEEL
*SOLID SECTION, ELSET=L1_FORCE, MATERIAL=STEEL
*SOLID SECTION, ELSET=L3_PRESSURE, MATERIAL=STEEL
*SOLID SECTION, ELSET=L4_SURFACE_PRESSURE, MATERIAL=STEEL
*SOLID SECTION, ELSET=L7_GRAVITY, MATERIAL=STEEL
*SOLID SECTION, ELSET=L8_CENTRIFUGAL, MATERIAL=STEEL
*SOLID SECTION, ELSET=L9_GRAVITY_SIDEWAYS, MATERIAL=STEEL
*SOLID SECTION, ELSET=S1_HELD, MATERIAL=STEEL
*SOLID SECTION, ELSET=S3_PRESCRIBED_DISPLACEMENT, MATERIAL=STEEL
*SOLID SECTION, ELSET=S5_HELD_TEMPERATURE, MATERIAL=STEEL
*SOLID SECTION, ELSET=S6_CYLINDRICAL_TRANSFORM, MATERIAL=STEEL
*SOLID SECTION, ELSET=T1_NODE_HEAT, MATERIAL=STEEL
*SOLID SECTION, ELSET=T2_SURFACE_HEAT, MATERIAL=STEEL
*SOLID SECTION, ELSET=T3_FILM, MATERIAL=STEEL
*SOLID SECTION, ELSET=T4_RADIATION, MATERIAL=STEEL
*SOLID SECTION, ELSET=T5_GIVEN_TEMPERATURE, MATERIAL=STEEL
*SOLID SECTION, ELSET=T6_BODY_HEAT, MATERIAL=STEEL
*SHELL SECTION, ELSET=L5_SHELL_EDGE_LOAD, MATERIAL=STEEL
1.
*SHELL SECTION, ELSET=S2_HELD_ROTATIONS, MATERIAL=STEEL
1.
*SHELL SECTION, ELSET=S4_PRESCRIBED_ROTATION, MATERIAL=STEEL
1.
*SOLID SECTION, ELSET=L6_PLANE_EDGE_PRESSURE, MATERIAL=STEEL
1.
*BEAM SECTION, ELSET=L2_MOMENT, MATERIAL=STEEL, SECTION=RECT
2., 2.
1., 0., 0.
*INITIAL CONDITIONS, TYPE=TEMPERATURE
NALL, 293.
*PHYSICAL CONSTANTS, ABSOLUTE ZERO=0., STEFAN BOLTZMANN=5.669e-11
*BOUNDARY
1, 1, 3
2, 1, 3
3, 1, 3
4, 1, 3
*BOUNDARY
9, 1, 6
10, 1, 6
*BOUNDARY
13, 1, 3
14, 1, 3
15, 1, 3
16, 1, 3
*BOUNDARY
21, 1, 6
24, 1, 6
*BOUNDARY
25, 1, 3
26, 1, 3
27, 1, 3
28, 1, 3
*BOUNDARY
NTFIX, 11, 11, 350.
*TRANSFORM, NSET=NCYL, TYPE=C
130.0, 5.0, 0., 130.0, 5.0, 1.
*BOUNDARY
33, 2, 3
34, 2, 3
35, 2, 3
36, 2, 3
33, 1, 1
*BOUNDARY
41, 1, 3
42, 1, 3
43, 1, 3
44, 1, 3
*BOUNDARY
49, 1, 6
*BOUNDARY
52, 1, 3
53, 1, 3
54, 1, 3
55, 1, 3
*BOUNDARY
60, 1, 3
61, 1, 3
62, 1, 3
63, 1, 3
*SURFACE, NAME=SPRESS
11, S2
11, S3
*BOUNDARY
68, 1, 6
71, 1, 6
*BOUNDARY
72, 1, 2
75, 1, 2
*BOUNDARY
76, 1, 3
77, 1, 3
78, 1, 3
79, 1, 3
*BOUNDARY
84, 1, 3
85, 1, 3
86, 1, 3
87, 1, 3
*BOUNDARY
92, 1, 3
93, 1, 3
94, 1, 3
95, 1, 3
*BOUNDARY
100, 1, 3
101, 1, 3
102, 1, 3
103, 1, 3
*BOUNDARY
108, 1, 3
109, 1, 3
110, 1, 3
111, 1, 3
*SURFACE, NAME=SCUT0
17, S2
*PRE-TENSION SECTION, SURFACE=SCUT0, NODE=112
0., 0., 1.
*BOUNDARY
113, 1, 3
114, 1, 3
115, 1, 3
116, 1, 3
*BOUNDARY
121, 1, 3
122, 1, 3
123, 1, 3
124, 1, 3
*SURFACE, NAME=SCUT1
19, S2
*PRE-TENSION SECTION, SURFACE=SCUT1, NODE=125
0., 0., 1.
*BOUNDARY
126, 1, 3
127, 1, 3
128, 1, 3
129, 1, 3
*BOUNDARY
134, 1, 3
135, 1, 3
136, 1, 3
137, 1, 3
*BOUNDARY
142, 1, 3
143, 1, 3
144, 1, 3
145, 1, 3
*BOUNDARY
150, 1, 3
151, 1, 3
152, 1, 3
153, 1, 3
*BOUNDARY
158, 1, 3
159, 1, 3
160, 1, 3
161, 1, 3
*BOUNDARY
166, 1, 3
167, 1, 3
168, 1, 3
169, 1, 3
*BOUNDARY
174, 1, 3
175, 1, 3
176, 1, 3
177, 1, 3
*RIGID BODY, NSET=NRIGID, REF NODE=182
*BOUNDARY
183, 1, 3
184, 1, 3
185, 1, 3
186, 1, 3
*SURFACE, NAME=SKIN
28, S2
*COUPLING, REF NODE=191, SURFACE=SKIN, CONSTRAINT NAME=KIN
*KINEMATIC
1, 3
*BOUNDARY
192, 1, 3
193, 1, 3
194, 1, 3
195, 1, 3
*SURFACE, NAME=SDIS
29, S2
*COUPLING, REF NODE=200, SURFACE=SDIS, CONSTRAINT NAME=DIS
*DISTRIBUTING
1, 3
*BOUNDARY
201, 1, 3
202, 1, 3
203, 1, 3
204, 1, 3
*BOUNDARY
209, 1, 3
210, 1, 3
211, 1, 3
212, 1, 3
*EQUATION
2
206, 3, 1., 213, 3, -1.
*MPC
BEAM, 207, 216
*BOUNDARY
217, 1, 3
218, 1, 3
219, 1, 3
220, 1, 3
*SURFACE, NAME=TIE_M
32, S2
*SURFACE, NAME=TIE_S
33, S1
*TIE, NAME=TIE1, POSITION TOLERANCE=0.1
TIE_S, TIE_M
*BOUNDARY
233, 1, 3
234, 1, 3
235, 1, 3
236, 1, 3
*BOUNDARY
241, 1, 2
242, 1, 2
243, 1, 2
244, 1, 2
245, 1, 2
246, 1, 2
247, 1, 2
248, 1, 2
*SURFACE, NAME=CON_M
34, S2
*SURFACE, NAME=CON_S, TYPE=NODE
241
242
243
244
*CONTACT PAIR, INTERACTION=TOUCH, TYPE=NODE TO SURFACE
CON_S, CON_M
*SURFACE INTERACTION, NAME=TOUCH
*SURFACE BEHAVIOR, PRESSURE-OVERCLOSURE=LINEAR
1.e4
*BOUNDARY
249, 1, 3
250, 1, 3
251, 1, 3
252, 1, 3
*BOUNDARY
253, 1, 2
254, 1, 2
255, 1, 2
256, 1, 2
*BOUNDARY
249, 11, 11, 293.
250, 11, 11, 293.
251, 11, 11, 293.
252, 11, 11, 293.
253, 11, 11, 293.
254, 11, 11, 293.
255, 11, 11, 293.
256, 11, 11, 293.
*SPRING, ELSET=C8_SPRING

100.
*DASHPOT, ELSET=C9_DASHPOT

1.
*GAP, ELSET=C10_GAP
5., 0., 0., 1.
*MASS, ELSET=C11_MASS
1.e-6
*STEP
*HEAT TRANSFER
1., 1.
*CFLUX
132, 11, 0.5
130, 11, -0.25
*DFLUX
22, S2, 0.02
22, S4, -0.01
*FILM
23, F2, 293., 0.001
23, F4, 293., 0.0005
*RADIATE
24, R2, 293., 0.8
*DFLUX
T6_BODY_HEAT, BF, 0.001
*NODE FILE
U, NT, RF
*EL FILE
S, E, HFL
*END STEP
*STEP
*STATIC
*CLOAD
11, 3, -2.
*BOUNDARY
17, 3, 3, 0.02
18, 3, 3, 0.02
19, 3, 3, 0.02
20, 3, 3, 0.02
*BOUNDARY
22, 5, 5, 0.002
23, 5, 5, 0.002
*CLOAD
37, 1, 5.
38, 1, 5.
39, 1, 5.
40, 1, 5.
*CLOAD
47, 1, 10.
48, 3, -5.
*CLOAD
51, 1, 2.
51, 5, 40.
51, 6, -20.
*DLOAD
10, P2, 1.
10, P4, 0.5
*DSLOAD
SPRESS, P, 0.8
*DLOAD
12, EDNOR2, 0.5
*DLOAD
13, P2, 0.5
*DLOAD
L7_GRAVITY, GRAV, 9810., 0., 0., -1.
*DLOAD
L8_CENTRIFUGAL, CENTRIF, 1.e4, 180.0, 35.0, 0., 0., 0., 1.
*DLOAD
L9_GRAVITY_SIDEWAYS, GRAV, 4000., 1., 0., 0.
*CLOAD
112, 1, 50.0
*CLOAD
125, 1, 100.0
*TEMPERATURE
NHOT, 393.
*CLOAD
182, 1, 5.
*CLOAD
191, 2, 5.
*CLOAD
200, 3, -5.
*CLOAD
206, 3, 5.
*CLOAD
231, 1, 5.
*DLOAD
35, P2, 0.2
*CLOAD
253, 3, 1.
254, 3, 1.
255, 3, 1.
256, 3, 1.
*NODE FILE
U, NT, RF
*EL FILE
S, E, HFL
*END STEP
*STEP
*STATIC
*CLOAD, OP=NEW
47, 1, -20.
*DLOAD
7, P2, 1.
*NODE FILE
U, NT, RF
*EL FILE
S, E, HFL
*END STEP
